// SBML level 2 version 4

model Chrysene_Pathway_CCA_iGEM()
  // Chrysene-Pathway-CCA-iGEM

  // Compartments:
  compartment Chrysene = 1;

  // Species:
  species Chrysene_Chrysene in Chrysene = 1;
  species _2_aminophenol in Chrysene = 1; _2_aminophenol is "2-aminophenol";
  species O2 in Chrysene = 1;
  species _2_aminomuconate in Chrysene = 1; _2_aminomuconate is "2-aminomuconate";
  species _6_semialdehyde in Chrysene = 1; _6_semialdehyde is "6-semialdehyde";
  species _2_aminomuconate1 in Chrysene = 1; _2_aminomuconate1 is "2-aminomuconate1";
  species NAD in Chrysene = 1; NAD is "NAD+";
  species NADH in Chrysene = 1;
  species ATP in Chrysene = 3;
  species _3E_2_oxohex_3_enedioate in Chrysene = 1; _3E_2_oxohex_3_enedioate is "(3E)-2-oxohex-3-enedioate";
  species NH3 in Chrysene = 1;
  species _2_oxopent_4_enoate in Chrysene = 1; _2_oxopent_4_enoate is "2-oxopent-4-enoate";
  species CO2 in Chrysene = 1;
  species S_4_hydroxy_2_oxopentanoate in Chrysene = 1; S_4_hydroxy_2_oxopentanoate is "(S)-4-hydroxy-2-oxopentanoate";
  species _2Z_2_hydroxpenta_4_dienoate in Chrysene = 1; _2Z_2_hydroxpenta_4_dienoate is "(2Z)-2-hydroxpenta, 4-dienoate";
  species H2O in Chrysene = 1;
  species S_4_hydroxy_2_oxopentanoate1 in Chrysene = 1; S_4_hydroxy_2_oxopentanoate1 is "(S)-4-hydroxy-2-oxopentanoate1";
  species acetaldehyde in Chrysene = 1;
  species pyruvate in Chrysene = 1;
  species acetyl_CoA in Chrysene = 1; acetyl_CoA is "acetyl-CoA";
  species NADH_2 in Chrysene = 1; NADH_2 is "NADH (2)";
  species NAD_1 in Chrysene = 1; NAD_1 is "NAD+ (1)";
  species NADH_1 in Chrysene = 1; NADH_1 is "NADH (1)";
  species ATP_1 in Chrysene = 3; ATP_1 is "ATP (1)";
  species ATP_2 in Chrysene = 10; ATP_2 is "ATP (2)";

  // Reactions:
  _1: Chrysene_Chrysene => O2 + _2_aminophenol; _1_kf*Chrysene_Chrysene;
    _1_kf = 1;
  _2: _2_aminophenol => _2_aminomuconate + _6_semialdehyde; _2_kf*_2_aminophenol;
    _2_kf = 1;
  _3: _2_aminomuconate + NAD => _2_aminomuconate1 + NADH; _3_kf*_2_aminomuconate*NAD;
    _3_kf = 1;
  _3a: NADH => ATP; _3a_kf*NADH;
    _3a_kf = 1;
  _4: _2_aminomuconate1 => _3E_2_oxohex_3_enedioate + NH3; _4_kf*_2_aminomuconate1;
    _4_kf = 1;
  _5: _3E_2_oxohex_3_enedioate => _2_oxopent_4_enoate + CO2; _5_kf*_3E_2_oxohex_3_enedioate;
    _5_kf = 1;
  _6: _2_oxopent_4_enoate => S_4_hydroxy_2_oxopentanoate; _6_kf*_2_oxopent_4_enoate;
    _6_kf = 1;
  _7: S_4_hydroxy_2_oxopentanoate => _2Z_2_hydroxpenta_4_dienoate + H2O; _7_kf*S_4_hydroxy_2_oxopentanoate;
    _7_kf = 1;
  _8: _2Z_2_hydroxpenta_4_dienoate => S_4_hydroxy_2_oxopentanoate1; _8_kf*_2Z_2_hydroxpenta_4_dienoate;
    _8_kf = 1;
  _9: S_4_hydroxy_2_oxopentanoate1 => acetaldehyde + pyruvate; _9_kf*S_4_hydroxy_2_oxopentanoate1;
    _9_kf = 1;
  _10: acetaldehyde + NAD_1 => acetyl_CoA + NADH_2 + NADH_1; _10_kf*acetaldehyde*NAD_1;
    _10_kf = 1;
  _10a: NADH_1 => ATP_1; _10a_kf*NADH_1;
    _10a_kf = 1;
  _11: acetyl_CoA => ATP_2; _11_kf*acetyl_CoA;
    _11_kf = 1;
end
