// SBML level 2 version 4

model FluorenePathway()
  // FluorenePathway

  // Compartments:
  compartment Fluorene = 1;

  // Species:
  species Fluorene_Fluorene in Fluorene = 1;
  species _9_fluorenol in Fluorene = 1; _9_fluorenol is "9-fluorenol";
  species NAD in Fluorene = 1; NAD is "NAD+";
  species NADH in Fluorene = 1;
  species ATP_1 in Fluorene = 3; ATP_1 is "ATP(1)";
  species _9_Fluorenone in Fluorene = 1; _9_Fluorenone is "9-Fluorenone";
  species NAD_1 in Fluorene = 1; NAD_1 is "NAD+(1)";
  species NADH_1 in Fluorene = 1; NADH_1 is "NADH(1)";
  species ATP_2 in Fluorene = 3; ATP_2 is "ATP(2)";
  species _1_9a_dihydroxy_1_9a_dihydro_9_H_fluoren_9_one in Fluorene = 1; _1_9a_dihydroxy_1_9a_dihydro_9_H_fluoren_9_one is "1,9a-dihydroxy-1, 9a-dihydro-9-H-fluoren-9-one";
  species _2_3_Dihydroxy_X_carboxybiphenyl in Fluorene = 1; _2_3_Dihydroxy_X_carboxybiphenyl is "2,3-Dihydroxy-X-carboxybiphenyl";
  species _2_Hydroxy_6_oxo_6_2_carboxyphenyl_hexa_2_4_denoate in Fluorene = 1; _2_Hydroxy_6_oxo_6_2_carboxyphenyl_hexa_2_4_denoate is "2-Hydroxy-6-oxo-6-(2-carboxyphenyl)-hexa-2,4-denoate";
  species cia_2_Hydroxypenta_2_4_dienoate in Fluorene = 1; cia_2_Hydroxypenta_2_4_dienoate is "cia-2-Hydroxypenta-2,4-dienoate";
  species Phtalate in Fluorene = 1;
  species _4_Hydroxy_2_oxovaerate in Fluorene = 1; _4_Hydroxy_2_oxovaerate is "4-Hydroxy-2-oxovaerate";
  species acetaldehyde in Fluorene = 1;
  species pyruvate in Fluorene = 1;
  species ATP_3 in Fluorene = 15; ATP_3 is "ATP(3)";

  // Reactions:
  Napthalene_1_2_dioxygenase: Fluorene_Fluorene + NAD => _9_fluorenol + NADH; Napthalene_1_2_dioxygenase_kf*Fluorene_Fluorene*NAD; Napthalene_1_2_dioxygenase is "Napthalene 1,2 dioxygenase";
    Napthalene_1_2_dioxygenase_kf = 1;
  _1: NADH => ATP_1; _1_kf*NADH;
    _1_kf = 1;
  _9_fluorenol_dehydrogenase: _9_fluorenol + NAD_1 => _9_Fluorenone + NADH_1; _9_fluorenol_dehydrogenase_kf*_9_fluorenol*NAD_1; _9_fluorenol_dehydrogenase is "9-fluorenol dehydrogenase";
    _9_fluorenol_dehydrogenase_kf = 1;
  _2: NADH_1 => ATP_2; _2_kf*NADH_1;
    _2_kf = 1;
  _9_fluorenone_3_4_deoxygenase: _9_Fluorenone => _1_9a_dihydroxy_1_9a_dihydro_9_H_fluoren_9_one; _9_fluorenone_3_4_deoxygenase_kf*_9_Fluorenone; _9_fluorenone_3_4_deoxygenase is "9-fluorenone-3,4-deoxygenase";
    _9_fluorenone_3_4_deoxygenase_kf = 1;
  _1_hydro_1_1a_dihydroxy_9_fluorenone_dehydrogenase: _1_9a_dihydroxy_1_9a_dihydro_9_H_fluoren_9_one => _2_3_Dihydroxy_X_carboxybiphenyl; _1_hydro_1_1a_dihydroxy_9_fluorenone_dehydrogenase_kf*_1_9a_dihydroxy_1_9a_dihydro_9_H_fluoren_9_one; _1_hydro_1_1a_dihydroxy_9_fluorenone_dehydrogenase is "1-hydro-1, 1a-dihydroxy-9-fluorenone dehydrogenase";
    _1_hydro_1_1a_dihydroxy_9_fluorenone_dehydrogenase_kf = 1;
  _2_3_dihydroxy_Z_carboxybiphenyl_1_2_dioxygenase: _2_3_Dihydroxy_X_carboxybiphenyl => _2_Hydroxy_6_oxo_6_2_carboxyphenyl_hexa_2_4_denoate; _2_3_dihydroxy_Z_carboxybiphenyl_1_2_dioxygenase_kf*_2_3_Dihydroxy_X_carboxybiphenyl; _2_3_dihydroxy_Z_carboxybiphenyl_1_2_dioxygenase is "2,3-dihydroxy-Z-carboxybiphenyl 1,2-dioxygenase";
    _2_3_dihydroxy_Z_carboxybiphenyl_1_2_dioxygenase_kf = 1;
  _2_hydroxy_6_oxo_6_2_carboxyphenyl_hexa_2_4_denoate_hydrolase: _2_Hydroxy_6_oxo_6_2_carboxyphenyl_hexa_2_4_denoate => cia_2_Hydroxypenta_2_4_dienoate + Phtalate; _2_hydroxy_6_oxo_6_2_carboxyphenyl_hexa_2_4_denoate_hydrolase_kf*_2_Hydroxy_6_oxo_6_2_carboxyphenyl_hexa_2_4_denoate; _2_hydroxy_6_oxo_6_2_carboxyphenyl_hexa_2_4_denoate_hydrolase is "2-hydroxy-6-oxo-6-(2-carboxyphenyl)-hexa-2,4-denoate hydrolase";
    _2_hydroxy_6_oxo_6_2_carboxyphenyl_hexa_2_4_denoate_hydrolase_kf = 1;
  _2_oxopent_4_enoate_hydratase: cia_2_Hydroxypenta_2_4_dienoate => _4_Hydroxy_2_oxovaerate; _2_oxopent_4_enoate_hydratase_kf*cia_2_Hydroxypenta_2_4_dienoate; _2_oxopent_4_enoate_hydratase is "2-oxopent-4-enoate hydratase";
    _2_oxopent_4_enoate_hydratase_kf = 1;
  _4_hydroxy_2_oxovalerate_aldolase: _4_Hydroxy_2_oxovaerate => acetaldehyde; _4_hydroxy_2_oxovalerate_aldolase_kf*_4_Hydroxy_2_oxovaerate; _4_hydroxy_2_oxovalerate_aldolase is "4-hydroxy-2-oxovalerate aldolase";
    _4_hydroxy_2_oxovalerate_aldolase_kf = 1;
  _3: _4_Hydroxy_2_oxovaerate => pyruvate; _3_kf*_4_Hydroxy_2_oxovaerate;
    _3_kf = 1;
  _4: pyruvate => ATP_3; _4_kf*pyruvate;
    _4_kf = 1;
end
