// SBML level 2 version 4

model NaphthalenePathway()
  // NaphthalenePathway

  // Compartments:
  compartment NaphthalenePathway = 1;

  // Species:
  species NADH in NaphthalenePathway = 1;
  species Naphthalene in NaphthalenePathway = 1;
  species O2 in NaphthalenePathway = 1;
  species NAD in NaphthalenePathway = 1; NAD is "NAD+";
  species _1R_2S_1_2_dihydronaphthalene_1_2_diol in NaphthalenePathway = 1; _1R_2S_1_2_dihydronaphthalene_1_2_diol is "(1R,2S)-1, 2-dihydronaphthalene-1, 2-diol";
  species naphthalene_1_2_diol in NaphthalenePathway = 1; naphthalene_1_2_diol is "naphthalene-1,2-diol";
  species NADH_2 in NaphthalenePathway = 1; NADH_2 is "NADH(2)";
  species _2_hydroxy_2H_chromene_2_carboxylate in NaphthalenePathway = 1; _2_hydroxy_2H_chromene_2_carboxylate is "2-hydroxy-2H-chromene-2-carboxylate";
  species _3E_4_2_hydroxyphenyl_2_oxobut_3_enoate in NaphthalenePathway = 1; _3E_4_2_hydroxyphenyl_2_oxobut_3_enoate is "(3E)-4-(2-hydroxyphenyl)-2-oxobut-3-enoate";
  species salicylaldehyde in NaphthalenePathway = 1;
  species pyruvate in NaphthalenePathway = 1;
  species salicylate in NaphthalenePathway = 0;
  species NADH_3 in NaphthalenePathway = 1; NADH_3 is "NADH(3)";

  // Reactions:
  reaction_1: Naphthalene + NADH + O2 => _1R_2S_1_2_dihydronaphthalene_1_2_diol + NAD; reaction_1_kf*Naphthalene*NADH*O2;
    reaction_1_kf = 1;
  reaction_2: _1R_2S_1_2_dihydronaphthalene_1_2_diol + NAD => naphthalene_1_2_diol + NADH_2; reaction_2_kf*_1R_2S_1_2_dihydronaphthalene_1_2_diol*NAD;
    reaction_2_kf = 1;
  reaction_3: naphthalene_1_2_diol + NADH_2 => _2_hydroxy_2H_chromene_2_carboxylate; reaction_3_kf*naphthalene_1_2_diol*NADH_2;
    reaction_3_kf = 1;
  reaction_4: _2_hydroxy_2H_chromene_2_carboxylate => _3E_4_2_hydroxyphenyl_2_oxobut_3_enoate; reaction_4_kf*_2_hydroxy_2H_chromene_2_carboxylate;
    reaction_4_kf = 1;
  reaction_5: _3E_4_2_hydroxyphenyl_2_oxobut_3_enoate => salicylaldehyde + pyruvate; reaction_5_kf*_3E_4_2_hydroxyphenyl_2_oxobut_3_enoate;
    reaction_5_kf = 1;
  reaction_6: salicylaldehyde + pyruvate => salicylate + NADH_3; reaction_6_kf*salicylaldehyde*pyruvate;
    reaction_6_kf = 1;
end
